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/batch
! ANSYS input file written by Workbench version 18.2 RELEASE
! File used for geometry attach: D:\Documents\GitHub\Bald-Guy-From-Die-Hard\Engine Model\Injectorigs1.IGS
/title,unsaved_project--Static Structural (A5)
/com,--- Data in consistent BIN units. See Solving Units in the help system for more information.
/units,BIN
/prep7
! Turn off shape checking because checks already performed inside WB mesher.
! See help system for more information.
SHPP,OFF,,NOWARN
etcon,set             ! allow ANSYS to choose best KEYOP's for 180x elements
/com,*********** Nodes for the whole assembly ***********
nblock,3,,15203
(1i9,3e20.9e3)
        1   -1.870856053E-001    5.500000003E-001   -7.749339505E-002
        2   -1.870856053E-001    0.000000000E+000   -7.749339518E-002
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-1
/com,*********** Elements for Body 1 "Part 1" ***********
et,1,187
eblock,19,solid,,8629
(19i9)
        1        1        1        1        0        0        0        0       10        0        1       26       36     1910     1909     2191     2259     2195     2194
     2258    13733
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-1
/com,*********** Send User Defined Coordinate System(s) ***********
csys,0
toffst,459.67,  ! Temperature offset from absolute zero
/com,*********** Set Reference Temperature ***********
tref,71.6
/com,*********** Send Materials ***********
MP,DENS,1,0.000734544492879577,	! slinch in^-3
MP,ALPX,1,6.66666666666667e-06,	! F^-1
MP,C,1,373722.969668162,	! in^2 s^-2 F^-1
MP,KXX,1,7.55607836445752,	! slinch in s^-3 F^-1
MP,RSVX,1,8.52348993288591,	! ohm cmil in^-1
MP,EX,1,29007547.5428236,	! slinch s^-2 in^-1
MP,NUXY,1,0.3,
MP,MURX,1,10000,

!************************* Model Summary ********************
!Part 1,	Structural Steel,	matid,	1
!************************* End Model Summary ********************
/com,********* Frictionless Supports X *********
CMBLOCK,_FRICSUX,NODE,      894
(8i10)
       105       108       109       110       111       112       113       114
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cmsel,s,_FRICSUX
d,all,ux,0
nsel,all
/com,********* Frictionless Supports Y *********
CMBLOCK,_FRICSUY,NODE,       35
(8i10)
       393       394       395       396       399       400       401       402
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cmsel,s,_FRICSUY
d,all,uy,0
nsel,all
/com,********* Frictionless Supports Z *********
CMBLOCK,_FRICSUZ,NODE,     1355
(8i10)
         1         2         3         4         5         6         7         8
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cmsel,s,_FRICSUZ
d,all,uz,0
nsel,all
/com,*********** Node Rotations ***********
nmod,1,,,,0.,0.,-22.5000000059825
nmod,2,,,,0.,0.,-22.5000000059825
nmod,3,,,,0.,0.,-22.5000000059825
nmod,4,,,,0.,0.,-22.5000000059825
nmod,5,,,,0.,0.,-22.5000000059825
nmod,6,,,,0.,0.,-22.5000000059825
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nmod,8120,,,,0.,0.,18.0489977060303
/com,*********** Define Pressure Using Surface Effect Elements ***********
et,2,154
eblock,10,,,414
(15i9)
     8630        2        2        2        0      964     1012     1024     1024     8316     8662     1024     8317
     8631        2        2        2        0      957      979      964      964     8228     8313      964     8227
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-1
esel,s,type,,2
esel,all

*DIM,_loadvari28,TABLE,2,1,1,TIME,
! Time values
_loadvari28(1,0,1) = 0.
_loadvari28(2,0,1) = 1.
! Load values
_loadvari28(1,1,1) = 0.
_loadvari28(2,1,1) = 999.999999864636

/com,*********** Define Pressure Using Surface Effect Elements ***********
et,3,154
eblock,10,,,22
(15i9)
     9044        3        3        3        0       29       39       30       30     2212     2221       30     2210
     9045        3        3        3        0       26       35       36       36     2190     2250       36     2191
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-1
esel,s,type,,3
esel,all

*DIM,_loadvari30,TABLE,2,1,1,TIME,
! Time values
_loadvari30(1,0,1) = 0.
_loadvari30(2,0,1) = 1.
! Load values
_loadvari30(1,1,1) = 0.
_loadvari30(2,1,1) = 1499.99999979695

esel,all
fini
/com,****************************************************************************
/com,*************************    SOLUTION       ********************************
/com,****************************************************************************
/solu
antype,0                   ! static analysis
eqsl,pcg,1e-8,,,,,,1
cntr,print,1               ! print out contact info and also make no initial contact an error
dmpoption,emat,no             ! Don't combine emat file for DANSYS
dmpoption,esav,no             ! Don't combine esav file for DANSYS
nldiag,cont,iter           ! print out contact info each equilibrium iteration
rescontrol,,none                 ! Do not keep any restart files
/com,****************************************************
/com,******************* SOLVE FOR LS 1 OF 1 ****************
esel,s,type,,2
nsle
sf,all,pres,%_loadvari28%
esel,s,type,,3
nsle
sf,all,pres,%_loadvari30%
nsel,all
esel,all
esel,all
nsub,1,1,1
time,1.
outres,erase
outres,all,none
outres,nsol,all
outres,rsol,all
outres,strs,all
outres,epel,all
outres,eppl,all
stabilize,off                   ! Stabilization turned OFF by user
! *********** WB SOLVE COMMAND ***********
! check interactive state
*get,ANSINTER_,active,,int
*if,ANSINTER_,ne,0,then
/eof
*endif
solve
/com *************** Write FE CONNECTORS *********
CEWRITE,file,ce,,INTE
/com,****************************************************
/com,*************** FINISHED SOLVE FOR LS 1 *************
*get,_PCGITER,active,,solu,cgiter
/post1
fini
